// SBML level 2 version 4

model MAPK_model()

  // Compartments:
  compartment default = 1 volume;
  compartment c1 in default = 1 volume;

  // Species:
  substanceOnly species MKKK in c1 = 90;
  substanceOnly species MKKK_P in c1 = 10;
  substanceOnly species MKK in c1 = 280;
  substanceOnly species MKK_P in c1 = 10;
  substanceOnly species MAPK in c1 = 280;
  substanceOnly species MAPK_P in c1 = 10;
  substanceOnly species MAPK_PP in c1 = 10;
  substanceOnly species MKK_PP in c1 = 10;

  // Reactions:
  v1: MKKK => MKKK_P; V1*MKKK*(K1 + MKKK)/(1 + (MAPK_PP/Ki)^n);  // modifiers: MAPK_PP
    V1 = 2.5 substance; n = 1 substance; Ki = 9 substance; K1 = 10 substance;
  v2: MKKK_P => MKKK; V2*MKKK_P/(K2 + MKKK_P);
    V2 = 0.25 substance; K2 = 8 substance;
  v3: MKK => MKK_P; k3*MKKK_P*MKK/(K3 + MKK);  // modifiers: MKKK_P
    k3 = 0.025 substance; K3 = 15 substance;
  v4: MKK_P => MKK_PP; k4*MKKK_P*MKK_P/(K4 + MKK_P);  // modifiers: MKKK_P
    k4 = 0.025 substance; K4 = 15 substance;
  v6: MKK_P => MKK; V6*MKK_P/(K6 + MKK_P);
    V6 = 0.75 substance; K6 = 15 substance;
  v5: MKK_PP => MKK_P; V5*MKK_PP/(K5 + MKK_PP);
    V5 = 0.75 substance; K5 = 15 substance;
  v7: MAPK => MAPK_P; k7*MKK_PP*MAPK/(K7 + MAPK);  // modifiers: MKK_PP
    K7 = 15 substance; k7 = 0.025 substance;
  v10: MAPK_P => MAPK; V10*MAPK_P/(K10 + MAPK_P);
    V10 = 0.5 substance; K10 = 15 substance;
  v8: MAPK_P => MAPK_PP; k8*MAPK_P*MKK_PP/(K8 + MAPK_P);  // modifiers: MKK_PP
    k8 = 0.025 substance; K8 = 15 substance;
  v9: MAPK_PP => MAPK_P; V9*MAPK_PP/(K9 + MAPK_PP);
    V9 = 0.5 substance; K9 = 15 substance;

  // Unit definitions:
  unit substance = mole;
  unit volume = litre;
  unit area = metre^2;
  unit length = metre;
  unit time = second;
end
