// SBML level 2 version 4

model ex2()

  // Compartments:
  compartment default = 1 volume;

  // Species:
  species A in default = 0.5/default; A is "s1";
  species B in default = 0.2/default; B is "s2";
  species C in default = 0.01/default; C is "s3";
  species D in default = 0.02/default; D is "s4";
  species E in default = 0; E is "s5";
  species F in default = 0; F is "s6";

  // Parameters:
  k2 = 0.01 substance;
  k1 = 29.6 substance;
  k3 = 0.6 substance;

  // Reactions:
  re2: A + B => C; k1*A*B;
  re1: C => D; k2*C;
  re5: D => E + F; k3*D;

  // Unit definitions:
  unit substance = mole;
  unit volume = litre;
  unit area = metre^2;
  unit length = metre;
  unit time = second;
end
