// SBML level 2 version 4

model ex3()

  // Compartments:
  compartment default = 1 volume;
  compartment c1 in default = 1 volume;

  // Species:
  substanceOnly species $G in c1 = 0.1;
  substanceOnly species mRNA in default = 0.5;
  substanceOnly species P in c1 = 0.5;
  substanceOnly species R in default = 0.5;
  substanceOnly species $s9 in default = 0;
  substanceOnly species $s11 in default = 0;

  // Parameters:
  a = 1 substance;
  s = 1 substance;
  v = 1 substance;
  u = 0.1 substance;
  h = 0.01 substance;
  n = 8 substance;
  d = 1 substance;

  // Reactions:
  re3: $G => mRNA; 1/(1 + (P/h)^n);  // modifiers: P
  re4: P => R; v*P;
  re5: R => P; u*R;
  re6: mRNA => R; s*mRNA;
  re7: mRNA => $s9; a*mRNA;
  re9: R => $s11; d*R;

  // Unit definitions:
  unit substance = mole;
  unit volume = litre;
  unit area = metre^2;
  unit length = metre;
  unit time = second;
end
